inf(n) := 10^n
inf(307) = 1e307
inf(308) =  # error: При попытке расчета этого выражения найдено число с абсолютной величиной больше 10^307.
zero(m) := 2^(-m)
zero(1019) = 1.78006e-307
zero(1020) = 8.9003e-308
eps(k) := 2^(-k)
res(k) := 1 + eps(k)
res(48) = 1
res(49) = 1
res(50) = 1
res(51) = 1
res(52) = 1
res(53) = 1
eps(52) = 2.22045e-16
